$PROB Emax Model
$INPUT ID CE DV
$DATA ../SimData.CSV IGNORE=@
$PRED
  CE50 = THETA(1) * EXP(ETA(1))
  BASE = THETA(2)
  F    = BASE * (1 - CE/(CE50 + CE))
  Y    = F + EPS(1)

$THETA
  (0, 10)
  (0, 100)

$OMEGA 0.2
$SIGMA 1
$EST MAXEVAL=9999 NOTBT NOOBT NOSBT PRINT=5 METHOD=COND LAPL INTER
$COV PRINT=ERS
$TAB ID ETA(1) FIRSTONLY NOAPPEND FILE=INDIPARA.OUT
$TAB ID CE G11 H11 ONEHEADER FILE=FIT.OUT
