2015-02-15
17:56
$PROB THEOPHYLLINE ORAL
$INPUT ID AMT TIME DV BWT
$DATA ../THEO.CSV
$PRED
  DOSE = 320
  KA   = THETA(1) * EXP(ETA(1))
  V    = THETA(2) * EXP(ETA(2))
  K    = THETA(3) * EXP(ETA(3))

  F    = DOSE / V * KA / (KA - K) * (EXP(-K*TIME) - EXP(-KA*TIME))
  Y    = F + F * EPS(1) + EPS(2)

$THETA
  (0, 2)
  (0, 50)
  (0, 0.1)

$OMEGA BLOCK(3)
  0.2
  0.1  0.2
  0.1  0.1  0.2

$SIGMA
  0.1
  0.1

$EST MAX=9999 NOTBT NOOBT NOSBT NOABORT METHOD=ZERO INTER POSTHOC
$COV PRINT=ERS
$TAB ID ETA(1) ETA(2) ETA(3) FIRSTONLY NOAPPEND FILE=INDIPARA.OUT
$TAB ID AMT TIME BWT ONEHEADER FILE=FIT.OUT

NM-TRAN MESSAGES
 WARNINGS AND ERRORS (IF ANY) FOR PROBLEM    1
 (WARNING  2) NM-TRAN INFERS THAT THE DATA ARE POPULATION.
 (WARNING  13) WITH USER-WRITTEN PRED OR $PRED, NM-TRAN CANNOT APPEND THE
 MDV DATA ITEM.

1NONLINEAR MIXED EFFECTS MODEL PROGRAM (NONMEM) VERSION 7.3.0
 ORIGINALLY DEVELOPED BY STUART BEAL, LEWIS SHEINER, AND ALISON BOECKMANN
 CURRENT DEVELOPERS ARE ROBERT BAUER, ICON DEVELOPMENT SOLUTIONS,
 AND ALISON BOECKMANN. IMPLEMENTATION, EFFICIENCY, AND STANDARDIZATION
 PERFORMED BY NOUS INFOSYSTEMS.
 PROBLEM NO.:         1
 THEOPHYLLINE ORAL
 TOT. NO. OF OBS RECS:      132
 TOT. NO. OF INDIVIDUALS:     12
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 #TBLN:      1
 #METH: First Order with Interaction
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
 #TERM:
0MINIMIZATION TERMINATED
 DUE TO MAX. NO. OF FUNCTION EVALUATIONS EXCEEDED
 NO. OF FUNCTION EVALUATIONS USED:    10019
 NO. OF SIG. DIGITS UNREPORTABLE

 #TERE:
 Elapsed estimation time in seconds:     2.70

 ********************                           FIRST ORDER WITH INTERACTION                         ********************
 #OBJT:**************                       MINIMUM VALUE OF OBJECTIVE FUNCTION                      ********************
 #OBJV:********************************************       57.430       **************************************************

 ********************                           FIRST ORDER WITH INTERACTION                         ********************
 ********************                             FINAL PARAMETER ESTIMATE                           ********************

 THETA - VECTOR OF FIXED EFFECTS PARAMETERS   *********
         TH 1      TH 2      TH 3
         3.13E+00  3.79E+01  1.02E-01

 OMEGA - COV MATRIX FOR RANDOM EFFECTS - ETAS  ********
            ETA1      ETA2      ETA3
 ETA1
+        1.16E+00
 ETA2
+        1.35E-01  3.10E-02
 ETA3
+        3.20E-01  3.82E-02  2.00E-01

 SIGMA - COV MATRIX FOR RANDOM EFFECTS - EPSILONS  ****
            EPS1      EPS2
 EPS1
+        1.19E-02
 EPS2
+        0.00E+00  5.33E-02

 OMEGA - CORR MATRIX FOR RANDOM EFFECTS - ETAS  *******
            ETA1      ETA2      ETA3
 ETA1
+        1.08E+00
 ETA2
+        7.10E-01  1.76E-01
 ETA3
+        6.63E-01  4.85E-01  4.47E-01

 SIGMA - CORR MATRIX FOR RANDOM EFFECTS - EPSILONS  ***
            EPS1      EPS2
 EPS1
+        1.09E-01
 EPS2
+        0.00E+00  2.31E-01
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 #CPUT: Total CPU Time in Seconds,        2.703
