2015-02-15
17:56
$PROB THEOPHYLLINE ORAL
$INPUT ID AMT TIME DV BWT
$DATA ../THEO.CSV
$PRED
  DOSE = 320
  KA   = THETA(1) * EXP(ETA(1))
  V    = THETA(2) * EXP(ETA(2))
  K    = THETA(3) * EXP(ETA(3))

  F    = DOSE / V * KA / (KA - K) * (EXP(-K*TIME) - EXP(-KA*TIME))
  Y    = F + F * EPS(1) + EPS(2)

$THETA
  (0, 2)
  (0, 50)
  (0, 0.1)

$OMEGA BLOCK(3)
  0.2
  0.1  0.2
  0.1  0.1  0.2

$SIGMA
  0.1
  0.1

$EST MAX=9999 NOTBT NOOBT NOSBT NOABORT METHOD=COND LAPL INTER
$COV PRINT=ERS
$TAB ID ETA(1) ETA(2) ETA(3) FIRSTONLY NOAPPEND FILE=INDIPARA.OUT
$TAB ID AMT TIME BWT ONEHEADER FILE=FIT.OUT

NM-TRAN MESSAGES
 WARNINGS AND ERRORS (IF ANY) FOR PROBLEM    1
 (WARNING  2) NM-TRAN INFERS THAT THE DATA ARE POPULATION.
 (WARNING  87) WITH "LAPLACIAN" AND "INTERACTION", "NUMERICAL" AND "SLOW"
 ARE ALSO REQUIRED ON $ESTIM RECORD, AND "SLOW" IS REQUIRED ON $COV
 RECORD. NM-TRAN HAS SUPPLIED THESE OPTIONS.
 (WARNING  13) WITH USER-WRITTEN PRED OR $PRED, NM-TRAN CANNOT APPEND THE
 MDV DATA ITEM.

1NONLINEAR MIXED EFFECTS MODEL PROGRAM (NONMEM) VERSION 7.3.0
 ORIGINALLY DEVELOPED BY STUART BEAL, LEWIS SHEINER, AND ALISON BOECKMANN
 CURRENT DEVELOPERS ARE ROBERT BAUER, ICON DEVELOPMENT SOLUTIONS,
 AND ALISON BOECKMANN. IMPLEMENTATION, EFFICIENCY, AND STANDARDIZATION
 PERFORMED BY NOUS INFOSYSTEMS.
 PROBLEM NO.:         1
 THEOPHYLLINE ORAL
 TOT. NO. OF OBS RECS:      132
 TOT. NO. OF INDIVIDUALS:     12
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 #TBLN:      1
 #METH: Laplacian Conditional Estimation with Interaction
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
 #TERM:
0MINIMIZATION SUCCESSFUL
 NO. OF FUNCTION EVALUATIONS USED:      377
 NO. OF SIG. DIGITS IN FINAL EST.:  3.4

 ETABAR IS THE ARITHMETIC MEAN OF THE ETA-ESTIMATES,
 AND THE P-VALUE IS GIVEN FOR THE NULL HYPOTHESIS THAT THE TRUE MEAN IS 0.

 ETABAR:        -2.6239E-02 -1.1224E-04  5.1227E-03
 SE:             1.8001E-01  3.7365E-02  3.7648E-02
 N:                      12          12          12

 P VAL.:         8.8411E-01  9.9760E-01  8.9177E-01

 ETAshrink(%):   1.5091E+00  1.0823E+00  3.2916E+00
 EBVshrink(%):   3.1150E+00  4.7107E+00  7.3706E+00
 EPSshrink(%):   7.9992E+00  8.7653E+00

 #TERE:
 Elapsed estimation time in seconds:     1.11
 Elapsed covariance time in seconds:     0.71

 ********************                LAPLACIAN CONDITIONAL ESTIMATION WITH INTERACTION               ********************
 #OBJT:**************                       MINIMUM VALUE OF OBJECTIVE FUNCTION                      ********************
 #OBJV:********************************************       93.559       **************************************************

 ********************                LAPLACIAN CONDITIONAL ESTIMATION WITH INTERACTION               ********************
 ********************                             FINAL PARAMETER ESTIMATE                           ********************

 THETA - VECTOR OF FIXED EFFECTS PARAMETERS   *********
         TH 1      TH 2      TH 3
         1.51E+00  3.23E+01  8.73E-02

 OMEGA - COV MATRIX FOR RANDOM EFFECTS - ETAS  ********
            ETA1      ETA2      ETA3
 ETA1
+        4.37E-01
 ETA2
+        5.63E-02  1.87E-02
 ETA3
+       -4.71E-03  1.26E-02  1.98E-02

 SIGMA - COV MATRIX FOR RANDOM EFFECTS - EPSILONS  ****
            EPS1      EPS2
 EPS1
+        1.77E-02
 EPS2
+        0.00E+00  7.56E-02

 OMEGA - CORR MATRIX FOR RANDOM EFFECTS - ETAS  *******
            ETA1      ETA2      ETA3
 ETA1
+        6.61E-01
 ETA2
+        6.23E-01  1.37E-01
 ETA3
+       -5.05E-02  6.57E-01  1.41E-01

 SIGMA - CORR MATRIX FOR RANDOM EFFECTS - EPSILONS  ***
            EPS1      EPS2
 EPS1
+        1.33E-01
 EPS2
+        0.00E+00  2.75E-01

 ********************                LAPLACIAN CONDITIONAL ESTIMATION WITH INTERACTION               ********************
 ********************                            STANDARD ERROR OF ESTIMATE                          ********************

 THETA - VECTOR OF FIXED EFFECTS PARAMETERS   *********
         TH 1      TH 2      TH 3
         2.97E-01  1.64E+00  4.00E-03

 OMEGA - COV MATRIX FOR RANDOM EFFECTS - ETAS  ********
            ETA1      ETA2      ETA3
 ETA1
+        2.22E-01
 ETA2
+        3.63E-02  8.23E-03
 ETA3
+        2.18E-02  6.82E-03  1.96E-02

 SIGMA - COV MATRIX FOR RANDOM EFFECTS - EPSILONS  ****
            EPS1      EPS2
 EPS1
+        9.90E-03
 EPS2
+       .........  7.65E-02

 OMEGA - CORR MATRIX FOR RANDOM EFFECTS - ETAS  *******
            ETA1      ETA2      ETA3
 ETA1
+        1.68E-01
 ETA2
+        2.53E-01  3.01E-02
 ETA3
+        2.28E-01  3.76E-01  6.97E-02

 SIGMA - CORR MATRIX FOR RANDOM EFFECTS - EPSILONS  ***
            EPS1      EPS2
 EPS1
+        3.72E-02
 EPS2
+       .........  1.39E-01

 ********************                LAPLACIAN CONDITIONAL ESTIMATION WITH INTERACTION               ********************
 ********************                          COVARIANCE MATRIX OF ESTIMATE                         ********************

            TH 1      TH 2      TH 3      OM11      OM12      OM13      OM22      OM23      OM33      SG11      SG12      SG22
 TH 1
+        8.81E-02
 TH 2
+        2.72E-01  2.69E+00
 TH 3
+       -1.29E-04  1.11E-03  1.60E-05
 OM11
+        4.02E-02  1.01E-01  1.15E-04  4.92E-02
 OM12
+        5.17E-03 -9.71E-03  1.17E-05  6.61E-03  1.31E-03
 OM13
+        3.82E-04  3.28E-03 -1.76E-05 -1.35E-03 -9.36E-05  4.77E-04
 OM22
+       -2.09E-04 -9.05E-04  1.03E-05  5.69E-04  1.36E-04 -1.50E-05  6.77E-05
 OM23
+        1.43E-05  2.05E-03 -1.89E-05 -4.14E-04 -9.98E-05  8.13E-05 -1.92E-05  4.66E-05
 OM33
+       -1.17E-04 -9.52E-03 -5.93E-05 -6.59E-04 -5.91E-05 -8.08E-05 -4.68E-05  6.91E-05  3.85E-04
 SG11
+       -9.19E-05  2.47E-03  2.16E-05 -4.47E-04 -8.60E-05  4.79E-05 -6.43E-06 -1.89E-05 -1.40E-04  9.80E-05
 SG12
+       ......... ......... ......... ......... ......... ......... ......... ......... ......... ......... .........
 SG22
+       -2.70E-03 -4.73E-02 -2.12E-04 -1.98E-03 -3.44E-05 -4.90E-04 -1.17E-04  1.92E-04  1.45E-03 -6.31E-04 .........  5.86E-03

 ********************                LAPLACIAN CONDITIONAL ESTIMATION WITH INTERACTION               ********************
 ********************                          CORRELATION MATRIX OF ESTIMATE                        ********************

            TH 1      TH 2      TH 3      OM11      OM12      OM13      OM22      OM23      OM33      SG11      SG12      SG22
 TH 1
+        2.97E-01
 TH 2
+        5.58E-01  1.64E+00
 TH 3
+       -1.09E-01  1.69E-01  4.00E-03
 OM11
+        6.10E-01  2.77E-01  1.30E-01  2.22E-01
 OM12
+        4.81E-01 -1.63E-01  8.09E-02  8.22E-01  3.63E-02
 OM13
+        5.90E-02  9.16E-02 -2.01E-01 -2.79E-01 -1.18E-01  2.18E-02
 OM22
+       -8.57E-02 -6.71E-02  3.14E-01  3.12E-01  4.57E-01 -8.34E-02  8.23E-03
 OM23
+        7.08E-03  1.83E-01 -6.94E-01 -2.73E-01 -4.03E-01  5.46E-01 -3.41E-01  6.82E-03
 OM33
+       -2.00E-02 -2.96E-01 -7.56E-01 -1.51E-01 -8.30E-02 -1.88E-01 -2.90E-01  5.16E-01  1.96E-02
 SG11
+       -3.13E-02  1.52E-01  5.45E-01 -2.04E-01 -2.39E-01  2.22E-01 -7.90E-02 -2.80E-01 -7.19E-01  9.90E-03
 SG12
+       ......... ......... ......... ......... ......... ......... ......... ......... ......... ......... .........
 SG22
+       -1.19E-01 -3.77E-01 -6.93E-01 -1.17E-01 -1.24E-02 -2.94E-01 -1.85E-01  3.68E-01  9.65E-01 -8.33E-01 .........  7.65E-02
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
 ********************                LAPLACIAN CONDITIONAL ESTIMATION WITH INTERACTION               ********************
 ********************                      EIGENVALUES OF COR MATRIX OF ESTIMATE                     ********************

             1         2         3         4         5         6         7         8         9        10        11
         1.46E-04  3.20E-03  3.07E-02  1.59E-01  2.49E-01  2.87E-01  7.41E-01  1.11E+00  1.96E+00  2.64E+00  3.82E+00
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 #CPUT: Total CPU Time in Seconds,        1.859
